New "Storage.battery3" phases=1 bus1=3 kv=2.4018 kVA=5.5986 kWrated=4.6655 kWhrated=18.662 %stored=45.4526270665684 %reserve=25 %EffCharge=95 %EffDischarge=95 %IdlingkW=0 Vminpu=0.95 Vmaxpu=1.05 DispMode=External kvar=3.0947
New "Storage.battery9" phases=1 bus1=9 kv=2.4018 kVA=2.8001 kWrated=2.3335 kWhrated=9.3338 %stored=30 %reserve=25 %EffCharge=95 %EffDischarge=95 %IdlingkW=0 Vminpu=0.95 Vmaxpu=1.05 DispMode=External kvar=1.5478
New "Storage.battery18" phases=1 bus1=18 kv=2.4018 kVA=5.5986 kWrated=4.6655 kWhrated=18.662 %stored=30 %reserve=25 %EffCharge=95 %EffDischarge=95 %IdlingkW=0 Vminpu=0.95 Vmaxpu=1.05 DispMode=External kvar=3.0947
New "Storage.battery26" phases=1 bus1=26 kv=2.4018 kVA=5.5986 kWrated=4.6655 kWhrated=18.662 %stored=30 %reserve=25 %EffCharge=95 %EffDischarge=95 %IdlingkW=0 Vminpu=0.95 Vmaxpu=1.05 DispMode=External kvar=3.0947
New "Storage.battery35" phases=1 bus1=35 kv=2.4018 kVA=5.5986 kWrated=4.6655 kWhrated=18.662 %stored=30 %reserve=25 %EffCharge=95 %EffDischarge=95 %IdlingkW=0 Vminpu=0.95 Vmaxpu=1.05 DispMode=External kvar=3.0947
New "Storage.battery41" phases=1 bus1=41 kv=2.4018 kVA=2.8001 kWrated=2.3335 kWhrated=9.3338 %stored=30 %reserve=25 %EffCharge=95 %EffDischarge=95 %IdlingkW=0 Vminpu=0.95 Vmaxpu=1.05 DispMode=External kvar=1.5478
New "Storage.battery48" phases=1 bus1=48 kv=2.4018 kVA=2.8001 kWrated=2.3335 kWhrated=9.3338 %stored=30 %reserve=25 %EffCharge=95 %EffDischarge=95 %IdlingkW=0 Vminpu=0.95 Vmaxpu=1.05 DispMode=External kvar=1.5478
New "Storage.battery53" phases=1 bus1=53 kv=2.4018 kVA=2.8001 kWrated=2.3335 kWhrated=9.3338 %stored=30.0003407783667 %reserve=25 %EffCharge=95 %EffDischarge=95 %IdlingkW=0 Vminpu=0.95 Vmaxpu=1.05 DispMode=External kvar=1.5478
New "Storage.battery61" phases=1 bus1=61 kv=2.4018 kVA=2.8001 kWrated=2.3335 kWhrated=9.3338 %stored=30 %reserve=25 %EffCharge=95 %EffDischarge=95 %IdlingkW=0 Vminpu=0.95 Vmaxpu=1.05 DispMode=External kvar=1.5478
New "Storage.battery67" phases=1 bus1=67 kv=2.4018 kVA=19.6014 kWrated=16.3345 kWhrated=65.338 %stored=31.7319500370675 %reserve=25 %EffCharge=95 %EffDischarge=95 %IdlingkW=0 Vminpu=0.95 Vmaxpu=1.05 DispMode=External kvar=10.8351
New "Storage.battery73" phases=1 bus1=73 kv=2.4018 kVA=5.5986 kWrated=4.6655 kWhrated=18.662 %stored=30 %reserve=25 %EffCharge=95 %EffDischarge=95 %IdlingkW=0 Vminpu=0.95 Vmaxpu=1.05 DispMode=External kvar=2.8056
New "Storage.battery79" phases=1 bus1=79 kv=2.4018 kVA=5.5986 kWrated=4.6655 kWhrated=18.662 %stored=30.0022704461816 %reserve=25 %EffCharge=95 %EffDischarge=95 %IdlingkW=0 Vminpu=0.95 Vmaxpu=1.05 DispMode=External kvar=-3.0947
New "Storage.battery87" phases=1 bus1=87 kv=2.4018 kVA=5.5986 kWrated=4.6655 kWhrated=18.662 %stored=30.0030430248778 %reserve=25 %EffCharge=95 %EffDischarge=95 %IdlingkW=0 Vminpu=0.95 Vmaxpu=1.05 DispMode=External kvar=-3.0947
New "Storage.battery94" phases=1 bus1=94 kv=2.4018 kVA=5.5986 kWrated=4.6655 kWhrated=18.662 %stored=30.0029276410957 %reserve=25 %EffCharge=95 %EffDischarge=95 %IdlingkW=0 Vminpu=0.95 Vmaxpu=1.05 DispMode=External kvar=-3.0947
New "Storage.battery101" phases=1 bus1=101 kv=2.4018 kVA=5.5986 kWrated=4.6655 kWhrated=18.662 %stored=30.001806212446 %reserve=25 %EffCharge=95 %EffDischarge=95 %IdlingkW=0 Vminpu=0.95 Vmaxpu=1.05 DispMode=External kvar=1.013
New "Storage.battery108" phases=1 bus1=108 kv=2.4018 kVA=5.5986 kWrated=4.6655 kWhrated=18.662 %stored=30 %reserve=25 %EffCharge=95 %EffDischarge=95 %IdlingkW=0 Vminpu=0.95 Vmaxpu=1.05 DispMode=External kvar=3.0947
New "Storage.battery116" phases=1 bus1=116 kv=2.4018 kVA=2.8001 kWrated=2.3335 kWhrated=9.3338 %stored=30 %reserve=25 %EffCharge=95 %EffDischarge=95 %IdlingkW=0 Vminpu=0.95 Vmaxpu=1.05 DispMode=External kvar=1.5478
